# Лабораторная работа №1
# Особенности технологии расчетов в системе компьютерной математики
# (MathCaD)
# Исследование функции:
y(x) := (x^4 + 1)/x^3
# 1) Область определения функции:
x ≠ 0
# 2) исследование функции на четность,нечетность
y(-x) → -(x^4 + 1)/x^3
# Функция нечетная
# 3)Точки пересечения графика функции с осями координат;
# Точки пересечения  с OХ и OY отсутсвуют
# 4)исследовать функцию на непрерывность; найти, если есть, точки разрыва первого или второго рода, найти пределы слева и справа в этих точках (если существуют конечные пределы слева и справа, то точка разрыва первого рода); найти вертикальные асимптоты;
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# x = 0 - точка разрыва II рода и является вертикальной асимптотой.
limit(y(x), x → 0+) → ∞
limit(y(x), x → 0-) → -∞
# 5)исследовать поведение функции на бесконечности
limit(y(x), x → -∞) → -∞
limit(y(x), x → ∞) → ∞
# Горизонтальных асимптот нет.
# 6)найти наклонные асимптоты
k := limit(y(x)/x, x → ∞) → 1
b := limit(y(x) - k*x, x → ∞) → 0
f(x) := k*x + b
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# Наклонной асимптотой является прямая y = x,т.к. k=1 и b=0
# 7)найти первую производную y1=f'(x) ; найти интервалы возрастания (f'(x)>0) и убывания (f'(x)<0) функции , ее экстремумы;
y1(x) := d/dx(y(x)) → 4 - 3*(x^4 + 1)/x^4
# Точки экстремума
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3^(1/4)  # точка минимума
y1(x) == 0 solve → [3^(1/4); 3^(1/4)*1i; -3^(1/4); -3^(1/4)*1i]
# (-3)^(1/4) | точка максимума
y1(x) > 0 solve → x < -3^(1/4) or 3^(1/4) < x  # Интервал возрастания функции
y1(x) < 0 solve → 0 < x < 3^(1/4) or -3^(1/4) < x < 0  # Интервал убывания функции
# 8)найти вторую производную y2=f''(x) ; найти интервалы выпуклости (f''(x)<0) и вогнутости  (f''(x)>0) функции f(x) , ее точки перегиба.
y2(x) := d^2/dx^2(y(x)) → 12*(x^4 + 1)/x^5 - 12/x
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y2(x) solve →  # error: No solution was found.  # Точек перегиба нет
y2(x) > 0 solve → 0 < x  # Интервал вогнутости функции
y2(x) < 0 solve → x < 0  # Интервал выпуклости функции
# Задание 2. Построить график параметрической функции (таблица 2) в декартовой системе координат, указывая по оси абсцисс в графической области x(t) , а по оси ординат y(t) . Для некоторых графиков параметр t следует задать как ранжированную переменную, например
t := -50, -49.99 .. 50
x(t) := t^3 - 3*π
y(t) := t^3 - 6*atan(t)
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# Задание 3. Построить график функции из таблицы 3 в полярной системе координат.
# Функции в полярной системе координат
a := 5
r(ϕ) := sqrt(a^2 - ϕ^2)
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ϕ := 0, π/2 .. 4*π
