# Лабораторная работа №2
# "Основы погрешностей вычислений"
# Задание 1. Найти предельные абсолютные и относительные погрешности чисел, если они имеют только верные цифры:
# а) в узком смысле | б) в широком смысле
x := 20.43
y := 0.576
Δx := 0.01/2 = 0.005
Δy := 0.001
# Абсолютная погрешность равна половине единицы младшего разряда
# Абсолютная погрешность равна единице младшего разряда
δx := |Δx/x|*100 = 0.0244738
δy := |Δy/y|*100 = 0.173611
# Ответ:
#
# абсолютная погрешность для числа x: 0.005
#
# относительная погрешность числа n: 0.0244738
#
# абсолютная погрешность для числа y: 0.001
#
# относительная погрешность числа y: 0.1736111
a := 4.05
b := 6.723
c := 0.03254
z := (b - c)/(2*a + b)
Δa := 0.005
Δb := 0.0005
Δc := 0.000005
1.
ch := b - c
ch = 6.69046
Δch := Δb + Δc
Δch < 0.005 = 1
Δch = 0.000505
# В числе ch цифры верны до cотых(6,6,9,а остальные сомнительные)
ch := 6.690  # сохраняем одну сомнительную цифру
2
k := 2*a
k = 8.1
Δk := 2*Δa
Δk < 0.05 = 1
Δk = 0.01
# В числе k ничего не меняем
k := 8.1
3
zn := k + b
zn = 14.823
Δzn := Δk + Δb
Δzn < 0.05 = 1
Δzn = 0.0105
# В числе zn цифры верны до десятых(1,4,8,а остальные сомнительные)
zn := 14.82  # сохраняем одну сомнительную цифру
4
div := ch/zn
div = 0.451417
Δdiv := (Δch*zn + Δzn*ch)/zn^2 = 0.000353905
Δdiv < 0.0005 = 1
# В числе div цифры верны до тысячных(0,4,5,1,а остальные сомнительные)
div := 0.451
δdiv := |Δdiv/div|*100 = 0.0784713
δa := |Δa/a|*100 = 0.123457
δb := |Δb/b|*100 = 0.00743716
δc := |Δc/c|*100 = 0.0153657
# Ответ: Величина div=0,451. Три цифры 4,5,1 верны по абсолютной погрешности
# Трёхмерная графика. Задание 3
q := 2
z(x, y) := y^2/(2*q)
z1(x, y) := -y^2/(2*q)  # Параболический цилиндр
# [component: inputs [(z, z1), □]]
# 1)
i := 0 .. 20
j := 0 .. 20
h := 0.2
x[i] := -2 + i*h
y[j] := -2 + j*h
M[i, j] := z(x[i], y[j])
M1[i, j] := z1(x[i], y[j])
# [component: inputs [(M, M1), □]]
M = [
    1, 0.81, 0.64, 0.49, 0.36, 0.25, 0.16, 0.09, 0.04, 0.01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;
    1, 0.81, 0.64, 0.49, 0.36, 0.25, 0.16, 0.09, 0.04, 0.01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;
    1, 0.81, 0.64, 0.49, 0.36, 0.25, 0.16, 0.09, 0.04, 0.01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;
    1, 0.81, 0.64, 0.49, 0.36, 0.25, 0.16, 0.09, 0.04, 0.01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;
    1, 0.81, 0.64, 0.49, 0.36, 0.25, 0.16, 0.09, 0.04, 0.01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;
    1, 0.81, 0.64, 0.49, 0.36, 0.25, 0.16, 0.09, 0.04, 0.01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;
    1, 0.81, 0.64, 0.49, 0.36, 0.25, 0.16, 0.09, 0.04, 0.01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;
    1, 0.81, 0.64, 0.49, 0.36, 0.25, 0.16, 0.09, 0.04, 0.01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;
    1, 0.81, 0.64, 0.49, 0.36, 0.25, 0.16, 0.09, 0.04, 0.01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;
    1, 0.81, 0.64, 0.49, 0.36, 0.25, 0.16, 0.09, 0.04, 0.01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;
    1, 0.81, 0.64, 0.49, 0.36, 0.25, 0.16, 0.09, 0.04, 0.01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;
    1, 0.81, 0.64, 0.49, 0.36, 0.25, 0.16, 0.09, 0.04, 0.01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;
    1, 0.81, 0.64, 0.49, 0.36, 0.25, 0.16, 0.09, 0.04, 0.01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;
    1, 0.81, 0.64, 0.49, 0.36, 0.25, 0.16, 0.09, 0.04, 0.01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;
    1, 0.81, 0.64, 0.49, 0.36, 0.25, 0.16, 0.09, 0.04, 0.01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;
    1, 0.81, 0.64, 0.49, 0.36, 0.25, 0.16, 0.09, 0.04, 0.01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;
    1, 0.81, 0.64, 0.49, 0.36, 0.25, 0.16, 0.09, 0.04, 0.01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;
    1, 0.81, 0.64, 0.49, 0.36, 0.25, 0.16, 0.09, 0.04, 0.01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;
    1, 0.81, 0.64, 0.49, 0.36, 0.25, 0.16, 0.09, 0.04, 0.01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;
    1, 0.81, 0.64, 0.49, 0.36, 0.25, 0.16, 0.09, 0.04, 0.01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;
    1, 0.81, 0.64, 0.49, 0.36, 0.25, 0.16, 0.09, 0.04, 0.01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]
M1 = [
    -1, -0.81, -0.64, -0.49, -0.36, -0.25, -0.16, -0.09, -0.04, -0.01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;
    -1, -0.81, -0.64, -0.49, -0.36, -0.25, -0.16, -0.09, -0.04, -0.01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;
    -1, -0.81, -0.64, -0.49, -0.36, -0.25, -0.16, -0.09, -0.04, -0.01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;
    -1, -0.81, -0.64, -0.49, -0.36, -0.25, -0.16, -0.09, -0.04, -0.01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;
    -1, -0.81, -0.64, -0.49, -0.36, -0.25, -0.16, -0.09, -0.04, -0.01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;
    -1, -0.81, -0.64, -0.49, -0.36, -0.25, -0.16, -0.09, -0.04, -0.01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;
    -1, -0.81, -0.64, -0.49, -0.36, -0.25, -0.16, -0.09, -0.04, -0.01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;
    -1, -0.81, -0.64, -0.49, -0.36, -0.25, -0.16, -0.09, -0.04, -0.01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;
    -1, -0.81, -0.64, -0.49, -0.36, -0.25, -0.16, -0.09, -0.04, -0.01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;
    -1, -0.81, -0.64, -0.49, -0.36, -0.25, -0.16, -0.09, -0.04, -0.01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;
    -1, -0.81, -0.64, -0.49, -0.36, -0.25, -0.16, -0.09, -0.04, -0.01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;
    -1, -0.81, -0.64, -0.49, -0.36, -0.25, -0.16, -0.09, -0.04, -0.01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;
    -1, -0.81, -0.64, -0.49, -0.36, -0.25, -0.16, -0.09, -0.04, -0.01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;
    -1, -0.81, -0.64, -0.49, -0.36, -0.25, -0.16, -0.09, -0.04, -0.01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;
    -1, -0.81, -0.64, -0.49, -0.36, -0.25, -0.16, -0.09, -0.04, -0.01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;
    -1, -0.81, -0.64, -0.49, -0.36, -0.25, -0.16, -0.09, -0.04, -0.01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;
    -1, -0.81, -0.64, -0.49, -0.36, -0.25, -0.16, -0.09, -0.04, -0.01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;
    -1, -0.81, -0.64, -0.49, -0.36, -0.25, -0.16, -0.09, -0.04, -0.01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;
    -1, -0.81, -0.64, -0.49, -0.36, -0.25, -0.16, -0.09, -0.04, -0.01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;
    -1, -0.81, -0.64, -0.49, -0.36, -0.25, -0.16, -0.09, -0.04, -0.01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;
    -1, -0.81, -0.64, -0.49, -0.36, -0.25, -0.16, -0.09, -0.04, -0.01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]
# 2)
a := 2
b := 4
z2(x, y) := x*y^3*exp(-x^2/a - y^2/b)
z3(x, y) := x^3*y*exp(-x^2/a - y^2/b)
Q := CreateMesh(z2, -π, π, -π, π, 30)
Q1 := CreateMesh(z3, -π, π, -π, π, 30)
# [component: inputs [(Q, Q1), □]]
# [component: inputs [(Q, Q1), □]]
# [component: inputs [(Q, Q1), □]]
# [component: inputs [(Q, Q1), □]]
# [component: inputs [(Q, Q1), □]]
# 3)
g(x) := (x^4 + 1)/x^3
a := -10
b := -1
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# Фигура вращения или вращение вокруг кривой oX
F(u, υ) := u
m := 30
G(u, υ) := g(u)*cos(υ)
H(u, υ) := g(u)*sin(υ)
SX := CreateMesh(F, G, H, a, b, 0, 2*π, m)
# [component: inputs SX]
# Вращение округ оси oY
F1(u, υ) := u*sin(υ)
G1(u, υ) := u*cos(υ)
H1(u, υ) := g(u)
SY := CreateMesh(F1, G1, H1, a, b, -π, π, m)
# [component: inputs SY]
# 4) | Геликоид
N := 30
i := 0 .. N
j := 0 .. N
φ[i] := i*π/N
θ[j] := j*2*π/N
a := 10
X[i, j] := φ[i]*cos(θ[j])
Y[i, j] := φ[i]*sin(θ[j])
Z[i, j] := a*θ[j]
# [component: inputs (X, Y, Z)]
# 5)
a := 3
b := 5
a0 := 0
b0 := 0
T(φ, θ) := [a0 + a*φ*cos(θ); b0 + b*φ*sin(θ); φ^2]
# [component: inputs T]
# Эллиптический параболоид
# 6)
a := 1
b := 2
c := -3
N := a*30
i := 0 .. N
a1 := 1
b1 := 1
c1 := 1
x[i] := a1 + a*i
y[i] := b1 + b*i
z[i] := c1 + c*i
# [component: inputs (x, y, z)]
# 7)
# [component: inputs Polyhedron("#10")]
