# Worksheet setting: ORIGIN = 1
# Вариант 10 | Вариант 30
f1(x) := 2*cos(x + π/6) + x^2 - 4*x + 3
f(x) := x^4*3^x - 2
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x := -3
root(f(x), x, 0, 1) = 0.922932
x := -2
root(f(x), x, -3, -2) = -2.14124
root(f1(x), x, 1, 2) = 1.02374
root(f1(x), x, 3, 4) = 3.50466
root(f(x), x, -6, -5) = -5.71666
ε := 0.00001
# Метод дихотомии
mpd(a, b, f, ε) :=
    return "Корней нет" if f(a)*f(b) > 0
    n ← 0
    while |b - a| > ε
        x ← (a + b)/2
        n ← n + 1
        break if f(x) == 0
        b ← x if f(a)*f(x) < 0
        a ← x otherwise
        M[n, 1] ← n
        M[n, 2] ← x
        M[n, 3] ← f(x)
    M
root(f(x), x, 0, 1) = 0.922932
root(f1(x), x, 1, 2) = 1.02374
mpd(0, 1, f, ε) = [
    1, 0.5, -1.89175;
    2, 0.75, -1.27875;
    3, 0.875, -0.467102;
    4, 0.9375, 0.163646;
    5, 0.90625, -0.174494;
    6, 0.921875, -0.0114601;
    7, 0.929688, 0.0745391;
    8, 0.925781, 0.0311567;
    9, 0.923828, 0.00975331;
    10, 0.922852, -0.000877059;
    11, 0.92334, 0.0044322;
    12, 0.923096, 0.00177609;
    13, 0.922974, 0.000449146;
    14, 0.922913, -0.000214049;
    15, 0.922943, 0.000117525;
    16, 0.922928, -4.82678e-5;
    17, 0.922935, 3.46273e-5
]
mpd(1, 2, f1, ε) = [
    1, 1.5, -1.62497;
    2, 1.25, -0.84033;
    3, 1.125, -0.389823;
    4, 1.0625, -0.151697;
    5, 1.03125, -0.0296297;
    6, 1.01562, 0.0321288;
    7, 1.02344, 0.00118995;
    8, 1.02734, -0.0142348;
    9, 1.02539, -0.00652617;
    10, 1.02441, -0.00266904;
    11, 1.02393, -0.000739781;
    12, 1.02368, 0.000225025;
    13, 1.0238, -0.000257392;
    14, 1.02374, -1.6187e-5;
    15, 1.02371, 0.000104418;
    16, 1.02373, 4.41154e-5;
    17, 1.02374, 1.39641e-5
]
p4 := mpd(1, 2, f1, ε)
p1 := mpd(0, 1, f, ε)
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root(f(x), x, -3, -2) = -2.14124
root(f1(x), x, 3, 4) = 3.50466
mpd(-3, -2, f, ε) = [
    1, -2.5, 0.505861;
    2, -2.25, 0.163751;
    3, -2.125, -0.0250638;
    4, -2.1875, 0.070568;
    5, -2.15625, 0.0230366;
    6, -2.14062, -0.000945259;
    7, -2.14844, 0.0110631;
    8, -2.14453, 0.00506324;
    9, -2.14258, 0.00206007;
    10, -2.1416, 0.000557671;
    11, -2.14111, -0.000193727;
    12, -2.14136, 0.000181989;
    13, -2.14124, -5.86491e-6;
    14, -2.1413, 8.8063e-5;
    15, -2.14127, 4.10993e-5;
    16, -2.14125, 1.76173e-5;
    17, -2.14124, 5.87619e-6
]
mpd(3, 4, f1, ε) = [
    1, 3.5, -0.0212073;
    2, 3.75, 1.21281;
    3, 3.625, 0.571838;
    4, 3.5625, 0.26912;
    5, 3.53125, 0.122383;
    6, 3.51562, 0.0501915;
    7, 3.50781, 0.0143926;
    8, 3.50391, -0.00343227;
    9, 3.50586, 0.00547395;
    10, 3.50488, 0.00101928;
    11, 3.50439, -0.00120688;
    12, 3.50464, -9.38967e-5;
    13, 3.50476, 0.000462669;
    14, 3.5047, 0.00018438;
    15, 3.50467, 4.52402e-5;
    16, 3.50465, -2.43286e-5;
    17, 3.50466, 1.04557e-5
]
p2 := mpd(-3, -2, f, ε)
p5 := mpd(3, 4, f1, ε)
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root(f(x), x, -6, -5) = -5.71666
mpd(-6, -5, f, ε) = [
    1, -5.5, 0.174122;
    2, -5.75, -0.0265589;
    3, -5.625, 0.0733998;
    4, -5.6875, 0.0232917;
    5, -5.71875, -0.00166972;
    6, -5.70312, 0.0108025;
    7, -5.71094, 0.00456417;
    8, -5.71484, 0.00144667;
    9, -5.7168, -0.000111662;
    10, -5.71582, 0.00066747;
    11, -5.71631, 0.000277895;
    12, -5.71655, 8.31142e-5;
    13, -5.71667, -1.42745e-5;
    14, -5.71661, 3.44197e-5;
    15, -5.71664, 1.00725e-5;
    16, -5.71666, -2.10101e-6;
    17, -5.71665, 3.98576e-6
]
p3 := mpd(-6, -5, f, ε)
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# Метод Ньютона
Newton(a, b, f, ε, nmax) :=
    n ← 0
    x ← a if (f(a)*d^2/da^2(f(a))) > 0
    x ← b otherwise
    h ← 2*ε
    while |h| > ε and n ≤ nmax
        h ← -f(x)/(d/dx(f(x)))
        x ← x + h
        n ← n + 1
        M[n, 1] ← n
        M[n, 2] ← x
        M[n, 3] ← f(x)
    M
root(f1(x), x, 1, 2) = 1.02374
root(f(x), x, 0, 1) = 0.922932
Newton(0, 1, f, ε, 30) = [1, 0.934623, 0.130462; 2, 0.923237, 0.00331464; 3, 0.922933, 2.30503e-6; 4, 0.922932, 1.11733e-12]
Newton(1, 2, f1, ε, 30) = [1, 1.0236, 0.000535204; 2, 1.02374, 1.79062e-8; 3, 1.02374, 0]
f1(1.02373857984) = -1.77636e-15
root(f(x), x, -3, -2) = -2.14124
root(f1(x), x, 3, 4) = 3.50466
Newton(-3, -2, f, ε, 30) = [1, -2.13868, -0.0039478; 2, -2.14124, -1.83313e-6; 3, -2.14124, -3.97238e-13]
Newton(3, 4, f1, ε, 30) = [1, 3.55995, 0.257033; 2, 3.50569, 0.00471801; 3, 3.50466, 1.74448e-6; 4, 3.50466, 2.38032e-13]
f1(3.50465926677) = -1.77636e-15
root(f(x), x, -6, -5) = -5.71666
Newton(-6, -5, f, ε, 30) = [1, -5.74478, -0.0224055; 2, -5.71662, 3.09709e-5; 3, -5.71666, 5.53388e-11; 4, -5.71666, 0]
f(-5.71665691241) = 1.77636e-15
# Метод Хорд
Hord(a, b, f, ε, nmax) :=
    return "Корней нет" if f(a)*f(b) > 0
    n ← 0
    x ← a
    while |f(x)| > ε and n < nmax
        x ← a - f(a)*(b - a)/(f(b) - f(a))
        n ← n + 1
        break if f(x) == 0
        b ← x if f(a)*f(x) < 0
        a ← x otherwise
        M[n, 1] ← n
        M[n, 2] ← x
        M[n, 3] ← f(x)
    M
root(f(x), x, 0, 1) = 0.922932
root(f1(x), x, 1, 2) = 1.02374
Hord(0, 1, f, ε, 30) = [
    1, 0.666667, -1.58912;
    2, 0.871256, -0.499355;
    3, 0.914134, -0.0936981;
    4, 0.92149, -0.0156193;
    5, 0.922697, -0.00255062;
    6, 0.922894, -0.000415107;
    7, 0.922926, -6.75204e-5;
    8, 0.922931, -1.09817e-5;
    9, 0.922932, -1.78607e-6
]
Hord(1, 2, f1, ε, 30) = [1, 1.03463, -0.0429444; 2, 1.0238, -0.000250692; 3, 1.02374, -1.45025e-6]
root(f1(x), x, 3, 4) = 3.50466
root(f(x), x, -3, -2) = -2.14124
Hord(-3, -2, f, ε, 30) = [1, -2.18182, 0.0619703; 2, -2.14217, 0.00143439; 3, -2.14126, 3.14435e-5; 4, -2.14124, 6.88407e-7]
Hord(3, 4, f1, ε, 30) = [
    1, 3.4142, -0.39887;
    2, 3.49148, -0.0597902;
    3, 3.50281, -0.00842996;
    4, 3.5044, -0.0011781;
    5, 3.50462, -0.000164438;
    6, 3.50465, -2.29482e-5;
    7, 3.50466, -3.20245e-6
]
root(f(x), x, -6, -5) = -5.71666
Hord(-6, -5, f, ε, 30) = [1, -5.72021, -0.00283202; 2, -5.71666, -1.76208e-6]
# Метод секущих:
ORIGIN := 0
ε := 0.01
nmax := 100
MS2(a, b, f, ε, nmax) :=
    n ← 0
    x0 ← a
    x1 ← b
    while |x1 - x0| > ε and n ≤ nmax
        x ← x1 - f(x1)*(x1 - x0)/(f(x1) - f(x0))
        n ← n + 1
        x0 ← x1
        x1 ← x
        M[n - 1, 0] ← n
        M[n - 1, 1] ← x
        M[n - 1, 2] ← f(x)
    M
f(x) := x^3 + x^2 - 1
MS2(0, 1, f, ε, 100) = [
    1, 0.5, -0.625;
    2, 0.692308, -0.188894;
    3, 0.775603, 0.0681331;
    4, 0.753523, -0.00435425;
    5, 0.75485, -9.03963e-5
]
# Метод Секущих
Sec(a, b, f, ε, nmax) :=
    return "Корней нет" if f(a)*f(b) > 0
    n ← 0
    if f(a)*d^2/da^2(f(a)) < 0
        x0 ← b
        x1 ← a
    otherwise
        x0 ← a
        x1 ← b
    while (|f(x)| ≥ ε) and (n < nmax)
        x ← x1 - f(x1)*(x0 - x1)/(f(x0) - f(x1))
        n ← n + 1
        x1 ← x
        M[n, 1] ← n
        M[n, 2] ← x
        M[n, 3] ← f(x)
    M
Sec(0, 1, f, ε, 30) = [
    0, 0, 0, 0;
    0, 1, 0.5, -0.625;
    0, 2, 0.692308, -0.188894;
    0, 3, 0.741194, -0.0434413;
    0, 4, 0.751969, -0.00933539;
    0, 5, 0.754263, -0.00197657;
    0, 6, 0.754748, -0.000417179;
    0, 7, 0.75485, -8.79919e-5;
    0, 8, 0.754872, -1.85567e-5;
    0, 9, 0.754876, -3.91334e-6
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]
Sec(1, 2, f1, ε, 30) = [
    0, 0, 0, 0;
    0, 1, 1.03463, -0.0429444;
    0, 2, 1.0238, -0.000250692;
    0, 3, 1.02374, -1.45025e-6;
    0, 4, 1.02374, -8.38928e-9;
    0, 5, 1.02374, -4.85301e-11;
    0, 6, 1.02374, 0;
    0, 7, 1.02374, 0;
    0, 8, 1.02374, 0;
    0, 9, 1.02374, 0
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]
Sec(-3, -2, f, ε, 30) = "Корней нет"
Sec(3, 4, f1, ε, 30) = [
    0, 0, 0, 0;
    0, 1, 3.4142, -0.39887;
    0, 2, 3.49148, -0.0597902;
    0, 3, 3.50281, -0.00842996;
    0, 4, 3.5044, -0.0011781;
    0, 5, 3.50462, -0.000164438;
    0, 6, 3.50465, -2.29482e-5;
    0, 7, 3.50466, -3.20245e-6;
    0, 8, 3.50466, -4.46905e-7;
    0, 9, 3.50466, -6.2366e-8
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]
Sec(-6, -5, f, ε, 30) = "Корней нет"
ORIGIN := 1
Sec(a, b, f, ε, nmax) :=
    return "Корней нет" if f(a)*f(b) > 0
    n ← 0
    x0 ← a
    x1 ← b
    while (|x1 - x0| > ε) and (n < nmax)
        x ← x1 - f(x1)*(x1 - x0)/(f(x1) - f(x0))
        n ← n + 1
        x0 ← x1
        x1 ← x
        M[n, 1] ← n
        M[n, 2] ← x
        M[n, 3] ← |x1 - x0|
    M
f(x) := x^3 + x^2 - 1
nmax := 30
ε := 0.01
a := 0
b := 1
a := 0
Sec(a, b, f, ε, nmax) = [
    1, 0.5, 0.5;
    2, 0.692308, 0.192308;
    3, 0.775603, 0.0832957;
    4, 0.753523, 0.0220801;
    5, 0.75485, 0.00132633
]
