# Worksheet setting: ORIGIN = 1
# Решение СЛАУ
# Встроенные функции
A := [1.02, -0.73, -9.11; 6.25, 2.32, 7.62; 1.13, -8.88, 4.64]
B := [-1.25; 2.33; -3.75]
|A| = 624.371
|1.02| > |-0.73| + |-9.11| = 0
|2.32| > |6.25| + |7.62| = 0
|4.64| > |1.13| + |-8.88| = 0
X0 := lsolve(A, B) = [0.0639787; 0.485548; 0.105467]
transpose(A) = [1.02, 6.25, 1.13; -0.73, 2.32, -8.88; -9.11, 7.62, 4.64]
C1 := transpose(A)*A = [41.3798, 3.721, 43.576; 3.721, 84.7697, -16.8745; 43.576, -16.8745, 162.586]
D1 := transpose(A)*B = [9.05; 39.6181; 11.7421]
X01 := lsolve(C1, D1) = [0.0639787; 0.485548; 0.105467]
A1 := [7.27, 1.59, -1.49; 5.12, 11.2, 2.98; -1.02, 0.73, 9.11]
B1 := [1.08; 6.08; 1.25]
|7.62| > |1.59| + |-1.49| = 1
|11.2| > |5.12| + |2.98| = 1
|9.11| > |-1.02| + |0.73| = 1
X1 := lsolve(A1, B1) = [0.0639787; 0.485548; 0.105467]
# Метод Гаусса
Gauss(A1, B1) :=
    c ← augment(A1, B1)
    d ← rref(c)
    e ← submatrix(d, 1, 3, 4, 4)
Gauss(A1, B1) = [0.0639787; 0.485548; 0.105467]
Gauss(A, b, n) :=
    for i ∈ 1 .. n
        for j ∈ 1 .. n
            A0[i, j] ← A[i, j]
        b0[i] ← b[i]
    for k ∈ 1 .. n
        if A[k, k] == 0
            m ← k + 1
            while m ≤ n and A[m, k] == 0
                m ← m + 1
            return "Система не обусловлена" if m > n
            for j ∈ 1 .. n
                R ← A[m, j]
                A[m, j] ← A[k, j]
                A[k, j] ← R
            L ← b[m]
            b[m] ← b[k]
            b[k] ← L
        for i ∈ 1 .. n
            if i ≠ k
                q ← A[i, k]/A[k, k]
                for j ∈ k .. n
                    A[i, j] ← A[i, j] - q*A[k, j]
                b[i] ← b[i] - q*b[k]
    for i ∈ n .. 1
        X[i] ← b[i]/A[i, i]
    for i ∈ 1 .. n
        s ← 0
        for j ∈ 1 .. n
            s ← s + A0[i, j]*X[j]
        δ[i] ← b0[i] - s
    return [X, A, δ]
A := [0, -0.73, -9.11; 0, 2.32, 7.62; 0, -8.88, 4.64]
B := [-1.25; 2.33; -3.75]
lsolve(A, B) =  # error: This calculation does not converge to a solution.
Gauss(A, B, 3) = "Система не обусловлена"
Gauss(A1, B1, 3) = [[0.0639787; 0.485548; 0.105467], [7.27, 0, 0; 0, 10.0802, 0; 0, 0, 8.51998], [0; 0; 0]]
lsolve(A1, B1) = [0.0639787; 0.485548; 0.105467]
Gauss(C1, D1, 3) = [[0.0639787; 0.485548; 0.105467], [41.3798, 0, 0; 0, 84.4351, 0; 0, 0, 111.577], [0; 7.10543e-15; -3.55271e-15]]
lsolve(C1, D1) = [0.0639787; 0.485548; 0.105467]
# Метод Зейделя
ε := 0.001
Zeidel(A, b, n, ε, kmax) :=
    k ← 0
    δ ← 1
    for i ∈ 1 .. n
        x[i] ← 0
    while δ > ε and k < kmax
        for i ∈ 1 .. n
            x0[i] ← x[i]
        k ← k + 1
        for i ∈ 1 .. n
            sum ← 0
            for j ∈ 1 .. n
                sum ← sum + A[i, j]*x[j] if i ≠ j
            x[i] ← 1/A[i, i]*(b[i] - sum)
            M[k, i + 1] ← x[i]
        M[k, 1] ← k
        δ ← |x - x0|
        M[k, n + 2] ← δ
    return M
lsolve(A, B) =  # error
Zeidel(A, B, 3, ε, 30) =  # error: Divide by zero.
Zeidel(A1, B1, 3, ε, 100) = [
    1, 0.148556, 0.474946, 0.115787, 0.51093;
    2, 0.0684124, 0.480775, 0.106346, 0.0809077;
    3, 0.0652026, 0.484755, 0.105668, 0.00515713;
    4, 0.0641934, 0.485396, 0.105504, 0.00120732;
    5, 0.0640193, 0.48552, 0.105474, 0.000215349
]
lsolve(A1, B1) = [0.0639787; 0.485548; 0.105467]
lsolve(C1, D1) = [0.0639787; 0.485548; 0.105467]
Zeidel(C1, D1, 3, ε, 100) = [
    1, 0.218706, 0.457761, 0.0611139, 0.510992;
    2, 0.113185, 0.474559, 0.0911388, 0.110988;
    3, 0.0800561, 0.48199, 0.100789, 0.0352969;
    4, 0.0692253, 0.484386, 0.103941, 0.0115318;
    5, 0.0656909, 0.485169, 0.104969, 0.00376319;
    6, 0.0645375, 0.485424, 0.105305, 0.00122812;
    7, 0.0641611, 0.485507, 0.105414, 0.000400794
]
