# Численное интегрирование
# 10 вариант | 30 вариант
f(x) := 3*x^2 + tan(x)
a := 0
b := 0.5
f1(x) := 1/log(x)
a1 := 4
b1 := 10
integral(f(x), x = a .. b) = 0.255584
integral(f1(x), x = a1 .. b1) = 7.3637
x2 := a1, a1 + 0.01 .. b1
x1 := a, a + 0.01 .. b
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# Площадь криволинейной
# трапеции
# Площадь криволинейной
# трапеции
S := integral(f(x), x = a .. b) → 0.255584240444
S1 := integral(f1(x), x = a1 .. b1) = 7.3637
# Обьем тела вращения | Площадь поверхности тела вращения
# Обьем тела вращения | Площадь поверхности тела вращения
2*π*integral(f(x)*sqrt(1 + (d/dx(f(x)))^2), x = a .. b) = 5.53216
π*integral(f(x)^2, x = a .. b) = 0.634401
π*integral(f1(x)^2, x = a1 .. b1) = 28.9898
2*π*integral(f1(x)*sqrt(1 + (d/dx(f1(x)))^2), x = a1 .. b1) = 46.701
# Длина дуги кривой
# Длина дуги кривой
integral(sqrt(1 + (d/dx(f(x)))^2), x = a .. b) = 1.40178
integral(sqrt(1 + (d/dx(f1(x)))^2), x = a1 .. b1) = 6.04844
# Вращение кривой вокруг оси Ox | Вращение кривой вокруг оси Ox
G1(u, v) := f1(u)*cos(v)
G(u, v) := f(u)*cos(v)
H1(u, v) := f1(u)*sin(v)
H(u, v) := f(u)*sin(v)
F2(u, v) := u
F(u, v) := u
SX1 := CreateMesh(F2, G1, H1, a1, b1, 0, 2*π, 30)
SX := CreateMesh(F, G, H, a, b, 0, 2*π, 30)
# [component: inputs SX]
# [component: inputs SX1]
LeftRectangle(f, a, b, n) :=
    I ← 0
    h ← (b - a)/n
    for i ∈ 0 .. n - 1
        I ← I + f(a + i*h)
    I*h
RightRectangle(f, a, b, n) :=
    I ← 0
    h ← (b - a)/n
    for i ∈ 1 .. n
        I ← I + f(a + i*h)
    I*h  # Метод левых прямоугольников  # Метод правых прямоугольников
I11 := LeftRectangle(f1, a1, b1, 10)
I22 := RightRectangle(f1, a1, b1, 10)
I22 = 7.17306
I11 = 7.56964
# Абсолютная Погрешность: | Абсолютная Погрешность:
ΔI11 := |I11 - S1| = 0.205941
ΔI22 := |I22 - S1| = 0.190637
I1 := LeftRectangle(f, a, b, 10)
I2 := RightRectangle(f, a, b, 10)
I1 = 0.223864
I2 = 0.288679  # Относительная Погрешность:
# Относительная Погрешность:
# Абсолютная Погрешность:
# Абсолютная Погрешность:
δI11 := ΔI11/S1*100 = 2.79671
δI22 := ΔI22/S1*100 = 2.58887
ΔI1 := |I1 - S| = 0.0317204
ΔI2 := |I2 - S| = 0.0330947
# Относительная Погрешность: | Относительная Погрешность:
δI1 := ΔI1/S*100 = 12.4109
δI2 := ΔI2/S*100 = 12.9487
# Метод средних прямоугольников
# Метод средних прямоугольников
MidRectangle(f, a, b, n) :=
    I ← 0
    h ← (b - a)/n
    for i ∈ 0 .. n - 1
        I ← I + f(a + i*h + h/2)
    I*h
I33 := MidRectangle(f1, a1, b1, 10)
I33 = 7.35989
# Абсолютная Погрешность:
ΔI33 := |I33 - S1| = 0.00381463
# Относительная Погрешность:
δI33 := ΔI33/S1*100 = 0.0518032
I3 := MidRectangle(f, a, b, 10)
I3 = 0.255241
# Абсолютная Погрешность:
ΔI3 := |I3 - S| = 0.000343566
# Относительная Погрешность:
δI3 := ΔI3/S*100 = 0.134424
# Метод трапеций
Trap(f, a, b, n) :=
    I ← 0
    h ← (b - a)/n
    for i ∈ 1 .. n - 1
        I ← I + f(a + i*h)
    (I + (f(a) + f(b))/2)*h
# Метод трапеций
I44 := Trap(f1, a1, b1, 10)
I44 = 7.37135
# Абсолютная Погрешность:
ΔI44 := |I44 - S1| = 0.00765228
I4 := Trap(f, a, b, 10)
# Относительная Погрешность:
I4 = 0.256271
δI44 := ΔI44/S1*100 = 0.103919
# Абсолютная Погрешность:
ΔI4 := |I4 - S| = 0.000687151
# Относительная Погрешность:
δI4 := ΔI4/S*100 = 0.268855
# Cимпсон(1 формула) | Cимпсон(1 формула)
Simpson(f, a, b, n) :=
    h ← (b - a)/n
    s ← 0
    t ← (f(b) - f(a))/2
    for i ∈ 0 .. n - 1
        w ← w + (f(a + i*h) + 2*f(a + i*h + h/2))
    s ← h/3*(t + w)
    s
I55 := Simpson(f1, a1, b1, 10)
I55 = 7.36371
# Абсолютная Погрешность:
ΔI55 := |I55 - S1| = 7.67183e-6
# Относительная Погрешность:
δI55 := ΔI55/S1*100 = 0.000104184
I5 := Simpson(f, a, b, 10)
I5 = 0.255584
# Абсолютная Погрешность:
ΔI5 := |I5 - S| = 6.33064e-9
# Относительная Погрешность:
δI5 := ΔI5/S*100 = 2.47693e-6
# Cимпсон(2 формула)
Simpson1(f, a, b, n) :=
    h ← (b - a)/n
    s ← 0
    q ← 0
    m ← n/2
    t ← f(a) + f(b)
    for i ∈ 1 .. m
        s ← s + 4*f(a + (2*i - 1)*h)
    for i ∈ 1 .. m - 1
        q ← q + 2*f(a + 2*i*h)
    s ← h/3*(t + s + q)
    s  # Cимпсон(2 формула)
I66 := Simpson1(f1, a1, b1, 20)
I66 = 7.36371
# Абсолютная Погрешность:
ΔI66 := |I66 - S1| = 7.67183e-6
# Относительная Погрешность:
δI66 := ΔI66/S1*100 = 0.000104184
I6 := Simpson1(f, a, b, 20)
I6 = 0.255584
# Абсолютная Погрешность:
ΔI6 := |I6 - S| = 6.33064e-9
# Относительная Погрешность:
δI6 := ΔI6/S*100 = 2.47693e-6
# Сравнение погрешностей методов: | Сравнение погрешностей методов:
ΔI1 = 0.0317204
δI1 = 12.4109
# Метод левых прямоугольников
ΔI11 = 0.205941
δI11 = 2.79671  # Метод левых прямоугольников
δI2 = 12.9487
δI22 = 2.58887  # Метод правых прямоугольников
ΔI2 = 0.0330947
# Метод правых прямоугольников
ΔI22 = 0.190637
ΔI3 = 0.000343566
δI3 = 0.134424
δI33 = 0.0518032  # Метод средних прямоугольников
# Метод средних прямоугольников
ΔI33 = 0.00381463
ΔI4 = 0.000687151
δI4 = 0.268855  # Метод трапеций
ΔI44 = 0.00765228
δI44 = 0.103919  # Метод трапеций
ΔI5 = 6.33064e-9
δI5 = 2.47693e-6  # Метод Симпсона(1)
ΔI55 = 7.67183e-6
δI55 = 0.000104184  # Метод Симпсона(1)
ΔI6 = 6.33064e-9
δI6 = 2.47693e-6  # Метод Симпсона(2)
ΔI66 = 7.67183e-6
δI66 = 0.000104184  # Метод Симпсона(2)
