# Интерполяция
# Задание 1:
# Полином Лагранжа
X := [0.02; 0.08; 0.12; 0.17; 0.23; 0.30]
Y := [1.02316; 1.09590; 1.14725; 1.21483; 1.30120; 1.40976]
# Метод наименьших квадратов
# Сортировка по возрастанию | Полином 1 степени
A[:, 0] := X
A[:, 1] := Y
A := csort(A, 0)
X := A[:, 0]
Y := A[:, 1]
transpose(X) = [0.02, 0.08, 0.12, 0.17, 0.23, 0.3]
m := 1
X := [3.54; 4.29; 4.78; 3.99; 1.13; 6.29; 1.89; 3.27]
Y := [22.81; 28.42; 24.95; 26.96; 8.78; 33.55; 15.77; 22.89]
transpose(Y) = [22.81, 28.42, 24.95, 26.96, 8.78, 33.55, 15.77, 22.89]
Lagrange(x, X, Y) := sum(Y[k]*product(if(j ≠ k, (x - X[j])/(X[k] - X[j]), 1), j = 0 .. last(X)), k = 0 .. last(Y))
i := 1 .. last(X)
j := 1 .. m
A[i, j] := X[i]^j
A = [0.02, 1.02316; 0.08, 4.29; 0.12, 4.78; 0.17, 3.99; 0.23, 1.13; 0.3, 6.29; 0, 1.89; 0, 3.27]
# Построим значения полинома в нужных точках, например, на интервале изменения значений X с шагом 0.01. Запишем в матрицу A значения x (0 столбец) и вычисленного полинома (столбец 1)
Z := transpose(A)*A
b := transpose(A)*Y
c := Z^-1*b
Lagrange(0.114, X, Y) = 2614.05
c = [-11.3467; 6.5333]
L := Lagrange(0.114, X, Y)
t := 0, 0.01 .. X[last(X)]
φ(X) := sum(c[i]*X^i, i = 1 .. m)
sum((Y[i] - φ(X[i]))^2, i = 1 .. last(X)) = 113.289
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C := corr(φ(X), X) = 1
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φ(X) = [23.1279; 28.0279; 31.2292; 26.0679; 7.38263; 41.0945; 12.3479; 21.3639]
φ(t) := interp(regress(X, Y, m), X, Y, t)
# Задание 2:
φ(t) = [
    6.44366; 6.48909; 6.53453; 6.57996; 6.6254; 6.67084; 6.71627; 6.76171; 6.80714; 6.85258
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]
# Полином 1 степени
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m := 1
X := [3.54; 4.29; 4.78; 3.99; 1.13; 6.29; 1.89; 3.27]
Y := [22.81; 28.42; 24.95; 26.96; 8.78; 33.55; 15.77; 22.89]
i := 0 .. last(X)
j := 0 .. m
A[i, j] := X[i]^j
A = [1, 3.54; 1, 4.29; 1, 4.78; 1, 3.99; 1, 1.13; 1, 6.29; 1, 1.89; 1, 3.27]
Z := transpose(A)*A
b := transpose(A)*Y
c := Z^-1*b
c = [6.44366; 4.54355]
t := 0, 0.01 .. X[last(X)]
φ(X) := sum(c[i]*X^i, i = 0 .. m)
sum((Y[i] - φ(X[i]))^2, i = 0 .. last(X)) = 35.3363
# Полином 2 степени
C := corr(φ(X), X) = 1
m := 2
X := [3.54; 4.29; 4.78; 3.99; 1.13; 6.29; 1.89; 3.27]
Y := [22.81; 28.42; 24.95; 26.96; 8.78; 33.55; 15.77; 22.89]
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i := 1 .. last(X)
j := 1 .. m
A[i, j] := X[i]^j
A = [
    1, 3.54, 0;
    1, 4.29, 18.4041;
    1, 4.78, 22.8484;
    1, 3.99, 15.9201;
    1, 1.13, 1.2769;
    1, 6.29, 39.5641;
    1, 1.89, 3.5721;
    1, 3.27, 10.6929
]
Z := transpose(A)*A
b := transpose(A)*Y
c := Z^-1*b
c = [4.85643; 5.46352; -0.125999]
t := 0, 0.01 .. X[last(X)]
φ(X) := sum(c[i]*X^i, i = 1 .. m)
sum((Y[i] - φ(X[i]))^2, i = 1 .. last(X)) = 207.967
φ(t) := interp(regress(X, Y, m), X, Y, t)
φ(t) = [
    1.19118; 1.27184; 1.3524; 1.43286; 1.51323; 1.5935; 1.67367; 1.75375; 1.83372; 1.9136
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]
C := corr(φ(X), X)  # error: This value must be a vector of real numbers.
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φ(X) =  # error: This value must be a vector of real numbers.
φ(t) := interp(regress(X, Y, m), X, Y, t)
φ(t) = [
    1.19118; 1.27184; 1.3524; 1.43286; 1.51323; 1.5935; 1.67367; 1.75375; 1.83372; 1.9136
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]
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# Полином 2 степени
m := 2
X := [3.54; 4.29; 4.78; 3.99; 1.13; 6.29; 1.89; 3.27]
Y := [22.81; 28.42; 24.95; 26.96; 8.78; 33.55; 15.77; 22.89]
i := 0 .. last(X)
j := 0 .. m
A[i, j] := X[i]^j
A = [
    1, 3.54, 12.5316;
    1, 4.29, 18.4041;
    1, 4.78, 22.8484;
    1, 3.99, 15.9201;
    1, 1.13, 1.2769;
    1, 6.29, 39.5641;
    1, 1.89, 3.5721;
    1, 3.27, 10.6929
]
# Полином 3 степени
Z := transpose(A)*A
b := transpose(A)*Y
c := Z^-1*b
c = [1.19118; 8.07087; -0.488]
m := 3
X := [3.54; 4.29; 4.78; 3.99; 1.13; 6.29; 1.89; 3.27]
Y := [22.81; 28.42; 24.95; 26.96; 8.78; 33.55; 15.77; 22.89]
t := 0, 0.01 .. X[last(X)]
φ(X) := sum(c[i]*X^i, i = 0 .. m)
sum((Y[i] - φ(X[i]))^2, i = 0 .. last(X)) =  # error: This array index is invalid for this array.
C := corr(φ(X), X)  # error: This array index is invalid for this array.
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i := 1 .. last(X)
j := 1 .. m
A[i, j] := X[i]^j
A = [
    1, 3.54, 12.5316, 0;
    1, 4.29, 18.4041, 78.9536;
    1, 4.78, 22.8484, 109.215;
    1, 3.99, 15.9201, 63.5212;
    1, 1.13, 1.2769, 1.4429;
    1, 6.29, 39.5641, 248.858;
    1, 1.89, 3.5721, 6.75127;
    1, 3.27, 10.6929, 34.9658
]
Z := transpose(A)*A
b := transpose(A)*Y
c := Z^-1*b
c = [-0.572193; 10.0168; -1.00063; 0.0391846]
t := 0, 0.01 .. X[last(X)]
φ(X) := sum(c[i]*X^i, i = 1 .. m)
sum((Y[i] - φ(X[i]))^2, i = 1 .. last(X)) = 21.8705
C := corr(φ(X), X) = 0.976878
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φ(t) := interp(regress(X, Y, m), X, Y, t)
φ(t) = [
    -8.30289; -8.11417; -7.9262; -7.73898; -7.55251; -7.3668; -7.18183; -6.99761; -6.81413; -6.6314
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]
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φ(X) =  # error
φ(t) = [
    -8.30289; -8.11417; -7.9262; -7.73898; -7.55251; -7.3668; -7.18183; -6.99761; -6.81413; -6.6314
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]
φ(t) := interp(regress(X, Y, m), X, Y, t)
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# Полином 2 степени
m := 3
X := [3.54; 4.29; 4.78; 3.99; 1.13; 6.29; 1.89; 3.27]
Y := [22.81; 28.42; 24.95; 26.96; 8.78; 33.55; 15.77; 22.89]
i := 0 .. last(X)
j := 0 .. m
A[i, j] := X[i]^j
A = [
    1, 3.54, 12.5316, 44.3619;
    1, 4.29, 18.4041, 78.9536;
    1, 4.78, 22.8484, 109.215;
    1, 3.99, 15.9201, 63.5212;
    1, 1.13, 1.2769, 1.4429;
    1, 6.29, 39.5641, 248.858;
    1, 1.89, 3.5721, 6.75127;
    1, 3.27, 10.6929, 34.9658
]
Z := transpose(A)*A
b := transpose(A)*Y
c := Z^-1*b
c = [-8.30289; 18.9104; -3.78471; 0.290983]
t := 0, 0.01 .. X[last(X)]
φ(X) := sum(c[i]*X^i, i = 0 .. m)
sum((Y[i] - φ(X[i]))^2, i = 0 .. last(X)) = 15.5757
C := corr(φ(X), X) = 0.97493
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φ(t) := interp(regress(X, Y, m), X, Y, t)
φ(t) = [
    -8.30289; -8.11417; -7.9262; -7.73898; -7.55251; -7.3668; -7.18183; -6.99761; -6.81413; -6.6314
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]
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