# Worksheet setting: ORIGIN = 1
# Задание 2:
n := 8
X := [3.54; 4.29; 4.78; 3.99; 1.13; 6.29; 1.89; 3.27]
Y := [22.81; 28.42; 24.95; 26.96; 8.78; 33.55; 15.77; 22.89]
# Сортировка по возрастанию
A[:, 1] := X
A[:, 2] := Y
A := csort(A, 1)
X := A[:, 1]
Y := A[:, 2]
transpose(X) = [1.13, 1.89, 3.27, 3.54, 3.99, 4.29, 4.78, 6.29]
transpose(Y) = [8.78, 15.77, 22.89, 22.81, 26.96, 28.42, 24.95, 33.55]
# Линейная регрессия:
a := line(X, Y) = [6.44366; 4.54355]  # возвращает массив коэффициентов линейной регрессии
a1 := intercept(X, Y) = 6.44366
# intercept (х, у) —коэффициент b линейной регрессии;
#
# slope (x,y) —коэффициент a линейной регрессии:
a2 := slope(X, Y) = 4.54355
f(t) := a[1] + a[2]*t
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sum((Y[i] - f(X[i]))^2, i = 1 .. n) = 35.3363  # Сумма квадратов разности
# Коэффициент корреляции линейной регрессии
Mx := mean(X) = 3.6475
# mean(A, B, C, ...): возвращает арифметическое среднее переменной A, B, C, ..., сложив все элементы аргументов и разделив их на общее количество элементов.
My := mean(Y) = 23.0162
r := sum((X[i] - Mx)*(Y[i] - My), i = 1 .. n)/sqrt(sum((X[i] - Mx)^2, i = 1 .. n)*sum((Y[i] - My)^2, i = 1 .. n)) = 0.956446
# Чем r ближе к 1, тем линейней зависимость
# Пoказатель характеризующий тесноту линейной связи между x и y называется коэффициентом корреляции
corr(X, Y) = 0.956446  # r рассчитанный маткадом
-1 ≤ r ≤ 1
# Полиноминальная регресия:
s := regress(X, Y, k)  # error: This variable is undefined.  # Возвращает вектор коэффициентов полинома, k - степень полинома
interp(s, X, Y, t)  # Вычисляет значение полинома в точке t (X и Y - массив абсцисс и ординат) S-массив коэффициентов полинома рассчитанный с помощью regress
# Полином 1-ой степени:
# возвращает вектор коэфициентов полинома к степени с помощью мнк по эксперементальным данным x-массив обцис у-ординат,элем массива должны быть упоряд по возрастанию
s := regress(X, Y, 1) = [3; 3; 1; 6.44366; 4.54355]
S(t) := interp(s, X, Y, t)  # вычисляет значение полинома в точке t ,с- массив коэф найденных с помощью функции регресии
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v := sqrt(1 - sum((Y[i] - S(X[i]))^2, i = 1 .. n)/sum((Y[i] - My)^2, i = 1 .. n)) = 0.956446
# Индекс корреляции.
# Величина индекса корреляции R находится в границах от 0 до 1. Чем ближе она к единице, тем теснее связь рассматриваемых признаков, тем более надежно уравнение регрессии.
# Сумма квадратов разности
# Чем ближе к нулю, тем лучше
# Показывет средний квадрат расстояний точек графика y от графика D(t)
sum((Y[i] - S(X[i]))^2, i = 1 .. n) = 35.3363
corr(X, Y) = 0.956446
# Полином 2-ей степени:
c := regress(X, Y, 2) = [3; 3; 2; 1.19118; 8.07087; -0.488]
C(t) := interp(c, X, Y, t)  # парабола при k = 2
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v := sqrt(1 - sum((Y[i] - C(X[i]))^2, i = 1 .. n)/sum((Y[i] - My)^2, i = 1 .. n)) = 0.97371
# Индекс корреляции.
# Величина индекса корреляции R находится в границах от 0 до 1. Чем ближе она к единице, тем теснее связь рассматриваемых признаков, тем более надежно уравнение регрессии.
sum((Y[i] - C(X[i]))^2, i = 1 .. n) = 21.5179  # Сумма квадратов разности
corr(X, Y) = 0.956446
# Полином 3-ей степени:
d := regress(X, Y, 3) = [3; 3; 3; -8.30289; 18.9104; -3.78471; 0.290983]
D(t) := interp(d, X, Y, t)  # кубическая парабола при k = 3
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v := sqrt(1 - sum((Y[i] - D(X[i]))^2, i = 1 .. n)/sum((Y[i] - My)^2, i = 1 .. n)) = 0.98104
sum((Y[i] - D(X[i]))^2, i = 1 .. n - 1) = 15.522
# Аппроксимация с помощью ЛКЛНФ - линейной комбинации линейно-независимых функций:
# F - это вектор функции содержаций набор лн функций
F11(t) := [t^1; t^3; t^5]  # сама функция возвращает вектор коэффициентов
F(t) := [1; t; t^3; t^5]  # вектор функция содержащая набор линейно независимых функций
# лн функции можно написать любые на своё усмотрение
F1(t) := [1; t; t^3; t^5; t^7]
k := linfit(X, Y, F1) = [2.05743; 6.21447; 0.171456; -0.0160217; 0.000275807]  # возвращает вектор коэффициентов
Z(t) := k*F1(t)  # Возвращает вектор коэф К который необходимо умножить на набор лин нез функций ,находящихся в вектор функции F
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# Данная аппроксимирующего функция наилучшим образом среди рассмотренных приближает исходную таблично-заданную функцию
v := sqrt(1 - sum((Y[i] - Z(X[i]))^2, i = 1 .. n)/sum((Y[i] - My)^2, i = 1 .. n)) = 0.984966
sum((Y[i] - Z(X[i]))^2, i = 1 .. n) = 12.3755
# Аппроксимация с помощью функций с нелинейной зависимостью от параметров
# 1)
expfit(x, y, g)
# <---->
a*e^(b*t) + C
# 2)
lgsfit(x, y, g)
# <---->
a/(1 + b*l^(b*t))
# 3)
sinfit(x, y, g)
# <---->
a*sin(x + b) + C
# 4)
pwrfit(x, y, g)
# <---->
a*x^b + C
# 5)
lgofit(x, y, g)
# <---->
a*ln(x + b) + C
# 6)
lnfit(x, y)
# <---->
a*ln(x) + b
# Аппроксимация с помощью функции с нелинейной зависимостью от параметра
g := [1; 0; 0]
# Функция expfit(vx, vy, [vg]) — возвращает вектор, содержащий три коэффициента для экспоненциальной кривой вида A · exp^(b·x) + C, которая наилучшим образом аппроксимирует данные в векторах vx и vy.
# Функция expfit использует для минимизации метод Левенберга-Марквардта. Для экспоненциального приближения, вид которого отличается от приведенного выше, используйте функцию genfit.
q := expfit(X, Y, g) = [4688272; 9.69127e-7; -4688265]
Q(t) := q[1]*e^(q[2]*t) + q[3]
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v := sqrt(1 - sum((Y[i] - Q(X[i]))^2, i = 1 .. n)/sum((Y[i] - My)^2, i = 1 .. n)) = 0.956446
sum((Y[i] - Q(X[i]))^2, i = 1 .. n) = 35.3364
# Функция sinfit(vx, vy, vg) возвращает вектор, содержащий коэффициенты синусоиды вида a · sin(x + b) + c, которая наилучшим образом аппроксимирует данные в векторах vx и vy с использованием начальных приближений vg.
# Функция sinfit использует для минимизации метод Левенберга-Маркара.
w := sinfit(X, Y, g) = [-8.81573; -0.392918; 22.4385]
W(t) := w[1]*sin(t + w[2]) + w[3]
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γ := sqrt(1 - sum((Y[i] - W(X[i]))^2, i = 1 .. n)/sum((Y[i] - My)^2, i = 1 .. n)) = 0.772428
sum((Y[i] - W(X[i]))^2, i = 1 .. n) = 167.267
g := [1; 1; 0]
# lgsfit(vx, vy, vg): возвращает вектор, содержащий коэффициенты для логистической кривой формы a / (1 + b · exp(−c·x)), наилучшим образом аппроксимирующей данные в vx и vy с использованием начальных приближений в vg.
# Функция lgsfit использует для минимизации метод Левенберга — Маркара.
m := lgsfit(X, Y, g) = [34.3645; 5.07779; 0.683538]
MG(A, b, n) :=
    for i ∈ 1 .. n
        for j ∈ 1 .. n
            a0[i, j] ← A[i, j]
        b0[i] ← b[i]
    for k ∈ 1 .. n - 1
        if A[k, k] == 0
            m ← k + 1
            while m ≤ n and A[m, k] == 0
                m ← m + 1
            return "Система не обусловлена" if m > n
            for j ∈ 1 .. n
                R ← A[m, j]
                A[m, j] ← A[k, j]
                A[k, j] ← R
            R ← b[m]
            b[m] ← b[k]
            b[k] ← R
        for i ∈ (k + 1) .. n
            q ← A[i, k]/A[k, k]
            for j ∈ k .. n
                A[i, j] ← A[i, j] - q*A[k, j]
            b[i] ← b[i] - q*b[k]
    x[n] ← b[n]/A[n, n]
    for i ∈ n - 1 .. 1
        s ← 0
        for j ∈ i + 1 .. n
            s ← s + A[i, j]*x[j]
        x[i] ← (b[i] - s)/A[i, i]
    for i ∈ 1 .. n
        s ← 0
        for j ∈ 1 .. n
            s ← s + a0[i, j]*x[j]
        δ[i] ← b0[i] - s
    return [x, A, δ]
M(t) := m[1]/(1 + m[2]*e^(-m[3]*t))
sum((Y[i] - M(X[i]))^2, i = 1 .. n) = 25.3442
γ := sqrt(1 - sum((Y[i] - M(X[i]))^2, i = 1 .. n)/sum((Y[i] - My)^2, i = 1 .. n)) = 0.96896
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# Функция pwrfit(vx, vy, vg) возвращает вектор, содержащий коэффициенты кривой мощности вида x^b + c, которая наилучшим образом аппроксимирует данные в векторах vx и vy с использованием начальных приближений vg.
q3 := pwrfit(X, Y, g) = [61.4762; 0.18555; -53.8673]
Q3(t) := q3[1]*t^q3[2] + q3[3]
sum((Y[i] - Q3(X[i]))^2, i = 1 .. n) = 18.4549
γ := sqrt(1 - sum((Y[i] - Q3(X[i]))^2, i = 1 .. n)/sum((Y[i] - My)^2, i = 1 .. n)) = 0.977495
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A1 := [
    n, sum(X[i], i = 1 .. n), sum(X[i]^2, i = 1 .. n), sum(X[i]^3, i = 1 .. n);
    sum(X[i], i = 1 .. n), sum(X[i]^2, i = 1 .. n), sum(X[i]^3, i = 1 .. n), sum(X[i]^4, i = 1 .. n);
    sum(X[i]^2, i = 1 .. n), sum(X[i]^3, i = 1 .. n), sum(X[i]^4, i = 1 .. n), sum(X[i]^5, i = 1 .. n);
    sum(X[i]^3, i = 1 .. n), sum(X[i]^4, i = 1 .. n), sum(X[i]^5, i = 1 .. n), sum(X[i]^6, i = 1 .. n)
]
B1 := [
    sum(Y[i], i = 1 .. n);
    sum(Y[i]*X[i], i = 1 .. n);
    sum(Y[i]*X[i]^2, i = 1 .. n);
    sum(Y[i]*X[i]^3, i = 1 .. n)
]
sum((Y[i] - Z(X[i]))^2, i = 1 .. n) = 12.3755
γ := sqrt(1 - sum((Y[i] - Z(X[i]))^2, i = 1 .. n)/sum((Y[i] - My)^2, i = 1 .. n)) = 0.984966
MG(A1, B1, 2) = [[6.44366; 4.54355], [
    8, 29.18, 124.81, 588.07;
    0, 18.3762, 588.07, 2965.3;
    124.81, 588.07, 2965.3, 15761.3;
    588.07, 2965.3, 15761.3, 87365.2
], [0; 0]]
MG(A1, B1, 3) = [[1.19118; 8.07087; -0.488], [
    8, 29.18, 124.81, 588.07;
    0, 18.3762, 132.825, 2965.3;
    0, 0, 58.0251, 15761.3;
    588.07, 2965.3, 15761.3, 87365.2
], [0; 0; 1.36424e-12]]
MG(A1, B1, 4) = [[-8.30289; 18.9104; -3.78471; 0.290983], [8, 29.18, 124.81, 588.07; 0, 18.3762, 132.825, 820.312; 0, 0, 58.0251, 657.399; 0, 0, 0, 70.1801], [-2.84217e-14; -1.13687e-13; -1.36424e-12; 0]]
# вектор коэфициентов полинома 1 степени с помощью мнк по эксперементальным данным x-массив обцис у-ординат
# вектор коэфициентов полинома 2 степени с помощью мнк по эксперементальным данным x-массив обцис у-ординат
# вектор коэфициентов полинома 3 степени с помощью мнк по эксперементальным данным x-массив обцис у-ординат
s = [3; 3; 1; 6.44366; 4.54355]
c = [3; 3; 2; 1.19118; 8.07087; -0.488]
d = [3; 3; 3; -8.30289; 18.9104; -3.78471; 0.290983]
# Интерполяция сплайнами
# Интерполяция | Интерполяция сплайнами:
# Кубический сплайн
# Задание 1:
# Эти функции возвращают вектор vs, который используется interp для того, чтобы создать кубический кусочно-линейный полином, проходящий все точки данных (x, y)
# Полином Лагранжа | кубические сплайнамы - отрезки кубических парабол
# Кубическая сплайн-интерполяция позволяет провести кривую через набор точек таким образом, что первые и вторые производные кривой непрерывны в каждой точке. Эта кривая образуется путем создания ряда кубических полиномов, проходящих через наборы из трёх смежных точек. Кубические полиномы затем состыковываются друг с другом, чтобы образовать одну кривую.
#
# Чтобы провести кубический сплайн через набор точек:
#
# Создайте векторы vx и vy, содержащие координаты x и y, через которые нужно провести кубический сплайн. Элементы vx должны быть расположены в порядке возрастания. (Хотя мы используем имена vx, vy и vs, нет никаких ограничений на имена этих переменных; можно использовать любые имена.)
# Вычислите вектор vs := cspline( vx, vy). Вектор vs содержит вторые производные интеполяционной кривой в рассматриваемых точках.
# Чтобы найти интерполируемое значение в произвольной точке, скажем x0, вычислите interp(vs, vx, vy, x0), где vs, vx и vy — векторы, описанные ранее.
n := 6
X := [0.02; 0.08; 0.12; 0.17; 0.23; 0.30]
Y := [1.02316; 1.09590; 1.14725; 1.21483; 1.30120; 1.40976]
# Результирующая сплайн-кривая в конечных точках
c := cspline(X, Y)  # <---->  # Кубическая
# cspline(vx, vy) или cspline(Mxy, Mz)
# • lspline(vx, vy) или lspline(Mxy, Mz)
# • pspline(vx, vy) или pspline(Mxy, Mz)
# Эти функции возвращают вектор vs, который используется interp для того, чтобы создать кубический кусочно-линейный полином, проходящий все точки данных (x, y). Кусочно-линейный полином имеет непрерывные первую и вторую производные для любого значения x. Результирующая сплайн-кривая в конечных точках является кубической (cspline), линейной (lspline) или параболической (pspline). Эти функции можно использовать для двумерных сплайнов, в которых поверхность, соответствующая кубическому полиному в x и y, проходит через сетку из точек таким образом, что первая и вторая производные поверхности непрерывны в каждой точке в любом направлении.
fc(t) := interp(c, X, Y, t)
Lagrange(X, Y, t) :=
    L ← 0
    for i ∈ 1 .. n
        w ← 1
        for j ∈ 1 .. n
            w ← (t - X[j])/(X[i] - X[j])*w if i ≠ j
        L ← L + w*Y[i]
    L
p := pspline(X, Y)  # <---->  # Параболическая
fp(t) := interp(p, X, Y, t)
l := lspline(X, Y)  # <---->  # Линейная
fl(t) := interp(l, X, Y, t)
# Функция interp в интерполяции и регрессии используется для интерполяции в данной точке выходных данных одной из следующих функций: cspline, lspline, pspline, bspline или loess.
# • interp(vs, vx, vy, x) или interp(vs, Mxy, Mz, X): возвращает интерполированное значение в точке x из коэффициентов вектора vs и исходные данные в vx и vy. При подгонке поверхности X является двухэлементным вектором, для которого рассчитываются интерполированные значения z.
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# Смысл сплайн-интерполяции заключается в том, что в промежутках между точками осуществляется аппроксимация в виде зависимости A(t)=at3+bt2+ ct+d. Коэффициенты а, b, с, d рассчитываются независимо для каждого промежутка, исходя из значений у* в соседних точках. Этот процесс скрыт от пользователя, поскольку смысл задачи интерполяции состоит в выдаче значения A(t) в любой точке t
# С помощью интерполяционного многочлена Лагранжа находим значение функции в точке х = 0.114
