# Worksheet setting: ORIGIN = 1
f(x) := x^2 + 4*sin(x)
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Sec(a, b, f, ε, nmax) :=
    return "Корней нет" if f(a)*f(b) > 0
    n ← 0
    if f(a)*d^2/da^2(f(a)) < 0
        x0 ← b
        x1 ← a
    otherwise
        x0 ← a
        x1 ← b
    while (|f(x)| ≥ ε) and (n < nmax)
        x ← x1 - f(x1)*(x0 - x1)/(f(x0) - f(x1))
        n ← n + 1
        x1 ← x
        M[n, 1] ← n
        M[n, 2] ← x
        M[n, 3] ← f(x)
    M
x := -2
root(f(x), x) = -1.93375
root(f(x), x, -2, -1) = -1.93375
ε := 0.00001
# <оператор>if <условие>
# <оператор> otherwise
for i ∈ 1, 3 .. n
    □
Sec(-2, 0, f1, ε, 30) =  # error: This variable is undefined.
mpd(a, b, f, ε) :=
    return "Корней нет" if f(a)*f(b) > 0
    n ← 0
    while |b - a| > ε
        x ← (a + b)/2
        n ← n + 1
        break if f(x) == 0
        b ← x if f(a)*f(x) < 0
        a ← x otherwise
    [n; x; f(x)]
Sec(0, 1, f, ε, 30) = 0
mpd(-2, -1, f, ε) = [17; -1.93375; 1.08111e-6]
mpd1(a, b, f, ε) :=
    return "Корней нет" if f(a)*f(b) > 0
    n ← 0
    while |b - a| > ε
        x ← (a + b)/2
        n ← n + 1
        break if f(x) == 0
        b ← x if f(a)*f(x) < 0
        a ← x otherwise
        M[n, 1] ← n
        M[n, 2] ← x
        M[n, 3] ← f(x)
    M
Sec(1, 5, f1, ε, 30) =  # error
Sec(-6, -4, f, ε, 30) = "Корней нет"
mpd1(-2, -1, f, ε) = [
    1, -1.5, -1.73998;
    2, -1.75, -0.873444;
    3, -1.875, -0.300718;
    4, -1.9375, 0.0198491;
    5, -1.90625, -0.143255;
    6, -1.92188, -0.0624057;
    7, -1.92969, -0.0214536;
    8, -1.93359, -0.000846021;
    9, -1.93555, 0.00949061;
    10, -1.93457, 0.00431956;
    11, -1.93408, 0.00173608;
    12, -1.93384, 0.00044486;
    13, -1.93372, -0.000200623;
    14, -1.93378, 0.000122108;
    15, -1.93375, -3.92605e-5;
    16, -1.93376, 4.1423e-5;
    17, -1.93375, 1.08111e-6
]
P := mpd1(-2, -1, f, ε)
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